t := 0, 1 .. 10000
λ := 3*10^-4
p(t) := e^(-λ*t)
P2(t) := 1 - p(t)
# Метод Декомпозиции
p2_3(t) := p(t)^2
p10_11(t) := p(t)^2
p4_9(t) := (1 - (1 - p(t))^2)^3 + (1 - p(t))^2*(1 - (1 - p(t)^2)^2)
p2_9(t) := 1 - (1 - p2_3(t))*(1 - p4_9(t))
p2_11(t) := 1 - (1 - p2_9(t))*(1 - p10_11(t))
p1_11(t) := p(t)*p2_11(t)
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# Метод минимальных путей
P5(t) := 1 - (1 - p(t))^2
Q1_3(t) := (1 - p(t)^2)
Q2_4(t) := (1 - p(t)^2)
Q1_5_4(t) := (1 - p(t)^2*P5(t))
Q2_5_3(t) := (1 - p(t)^2*P5(t))
P_verh(t) := 1 - (Q1_3(t)*Q2_4(t)*Q1_5_4(t)*Q2_5_3(t))
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q(t) := 1 - p(t)
q_mid(t) := 1 - P5(t)
# Метод минимальных сечений
P1_2(t) := (1 - q(t)^2)
P3_4(t) := (1 - q(t)^2)
P1_5_4(t) := (1 - q(t)^2*q_mid(t))
P2_5_3(t) := (1 - q(t)^2*q_mid(t))
P_nizh_sech(t) := P1_2(t)*P3_4(t)*P1_5_4(t)*P2_5_3(t)
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max_paths(t) := max(P5(t), Q1_5_4(t), Q2_5_3(t))
min_sech(t) := min(P1_2(t)*P3_4(t), P1_5_4(t), P2_5_3(t))
